seto beam
pnt p1 0 0 0
pnt p2 0.25 0 0
pnt p3 0.5 0 0
pnt p4 0.75 0 0
pnt p5 1.0 0 0
line l1 p1 p2 25
line l2 p2 p3 25
line l3 p3 p4 25
line l4 p4 p5 25
seta lines l l1 l2 l3 l4
swep lines sweplines tra 0.0 0.0 0.1 10
seta surfaces s A001 A002 A003 A004
swep surfaces swepsurface tra 0.0 0.05 0.0 5
setc beam

elty beam he8
mesh beam
send beam abq

plot f beam
plus n beam
view edge off
view elem
